Asa
#Mach
 0.0
#IYsym   IZsym   Zsym
 0       0       0.0
#Sref    Cref    Bref
1.668    0.358   4.66
#Xref    Yref    Zre
0.104     0.0     0.0
#
#
#====================================================================
SURFACE
Wing
#Nchordwise  Cspace   Nspanwise   Sspace
8            1.0       12         1.0
#
YDUPLICATE
0.0
#
ANGLE
2.0
#-------------------------------------------------------------
SECTION
#Xle    Yle    Zle     Chord   Ainc  Nspanwise  Sspace
0.      0.     0.      2.2     0.0   0          0

AFILE
FX_76-MP-120.dat

# This scales the effective dcl/da of the section airfoil; Aproximation = 1 + 0.77 * t/c
CLaf
1.0924

#Cname   Cgain  Xhinge  HingeVec     SgnDup
CONTROL
flap     1.0   0.75    0.0 0.0 0.0   1.0

CONTROL
aileron  -1.0   0.75    0.0 0.0 0.0  -1.0
